// SBML level 3 version 1

model simple()
  // model units - volume: volume

  // Compartments:
  compartment defaultc = 1 volume;

  // Species:
  substanceOnly species L in defaultc = 10;  // substance in count_volume
  substanceOnly species R in defaultc = 10;  // substance in count_volume
  substanceOnly species LR in defaultc = 1;  // substance in count_volume
  substanceOnly species RR in defaultc = 1;  // substance in count_volume
  substanceOnly species pLR in defaultc = 1;  // substance in count_volume

  // Parameters:
  k1 = 0.2 rate;
  k2 = 1 rate;
  k3 = 1 rate;
  k4 = 1 rate;
  k5 = 1 rate;
  k6 = 1 rate;

  // Reactions:
  r1: L + R => LR; k1*L*R;
  r2: LR => L + R; k2*LR;
  r3: 2 R => RR; k3*R;
  r4: RR => 2 R; k4*RR;
  r5: LR => pLR; k5*LR;
  r6: pLR => LR; k6*pLR;

  // Unit definitions:
  unit count = item;
  unit rate = item / second;
  unit volume = litre;
  unit count_volume = item * litre;
end
